*Heading
** Job name: Job-1 Model name: nle5xf3c
** Generated by: Abaqus/CAE 2025
*Preprint, echo=NO, model=NO, history=NO, contact=NO
**
** PARTS
**
*Part, name=PART-1
*Node
      1,           0.,          -1.,          -1.
      2,        0.625,          -1.,          -1.
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*Element, type=S4R
75, 215, 217, 317, 315
65, 213, 215, 315, 313
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*Elset, elset=EALL
  1,  3,  5, 11, 13, 15
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** Section: Section-1-EALL
*Shell Section, elset=EALL, material=MAT
0.1, 5
*End Part
**
**
** ASSEMBLY
**
*Assembly, name=Assembly
**
*Instance, name=PART-1-1, part=PART-1
*End Instance
**
*Nset, nset=FIX, instance=PART-1-1, generate
   1,  301,   50
*Elset, elset=PRINT, instance=PART-1-1
 11, 21
*Nset, nset=_M5, internal, instance=PART-1-1
 217, 317
*Nset, nset=_M6, internal, instance=PART-1-1
  17, 117
*End Assembly
**
** MATERIALS
**
*Material, name=MAT
*Elastic
 2.1e+11, 0.3
**
** BOUNDARY CONDITIONS
**
** Name: Disp-BC-1 Type: Symmetry/Antisymmetry/Encastre
*Boundary
FIX, ENCASTRE
** ----------------------------------------------------------------
**
** STEP: Step-1
**
*Step, name=Step-1, nlgeom=NO
*Static
1., 1., 1e-05, 1.
**
** LOADS
**
** Name: CFORCE-1   Type: Concentrated force
*Cload
_M5, 3, 300000.
** Name: CFORCE-2   Type: Concentrated force
*Cload
_M6, 3, -300000.
**
** OUTPUT REQUESTS
**
*Restart, write, frequency=0
**
** FIELD OUTPUT: F-Output-2
**
*Output, field
*Element Output, directions=YES
ALPHA, ALPHAN, CS11, CTSHR, E, EE, EEQUT, ER, IE, LE, MISES, MISESMAX, MISESONLY, NE, PE, PEEQ
PEEQMAX, PEEQT, PEMAG, PEQC, PRESSONLY, PS, S, SALPHA, SE, SEE, SEP, SEPE, SEQUT, SPE, SSAVG, TE
TEEQ, TEVOL, THE, TRIAX, TSHR, VE, VEEQ, VS, YIELDPOT
**
** FIELD OUTPUT: F-Output-1
**
*Node Output
COORD, U, UR, UT, V, VR, VT
*Element Output, directions=YES
COORD,
*Output, history, frequency=0
*End Step
