*Heading
** Job name: Job-1 Model name: raasch_s4_20x144
** Generated by: Abaqus/CAE 2020
*Preprint, echo=NO, model=NO, history=NO, contact=NO
**
** PARTS
**
*Part, name=PART-1
*Node
      1,           0.,           0.,           0.
      2,  0.915643811, 0.0299750753,           0.
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*Element, type=S4
    1,     1,     2,  1002,  1001
    2,     2,     3,  1003,  1002
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*Elset, elset=EALL
     1,     2,     3,     4,     5,     6
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** Section: Section-1-EALL
*Shell Section, elset=EALL, material=A1
2., 3
*End Part
**
**
** ASSEMBLY
**
*Assembly, name=Assembly
**
*Instance, name=PART-1-1, part=PART-1
*End Instance
**
*Nset, nset=BOT, instance=PART-1-1, generate
   1,  145,    1
*Elset, elset=EDGE, instance=PART-1-1, generate
   144,  19144,   1000
*Nset, nset=NALL, instance=PART-1-1
     1,     2,     3,     4,     5,     6
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*Nset, nset=R14-B, instance=PART-1-1, generate
  1,  17,   1
*Nset, nset=R14-T, instance=PART-1-1, generate
 20001,  20017,      1
*Nset, nset=R46-B, instance=PART-1-1, generate
  17,  145,    1
*Nset, nset=R46-T, instance=PART-1-1, generate
 20017,  20145,      1
*Nset, nset=TIP, instance=PART-1-1, generate
   145,  20145,   1000
*Nset, nset=TOP, instance=PART-1-1, generate
 20001,  20145,      1
*Nset, nset=WALL, instance=PART-1-1, generate
     1,  20001,   1000
*Nset, nset=_M14, internal, instance=PART-1-1
 100001,
*Nset, nset=_M15, internal, instance=PART-1-1
 100001,
*Elset, elset=_EDGE_E2, internal, instance=PART-1-1, generate
   144,  19144,   1000
*Surface, type=ELEMENT, name=EDGE
_EDGE_E2, E2
** Constraint: TIPLOAD
*Coupling, constraint name=TIPLOAD, ref node=_M14, surface=EDGE
*Distributing, weighting method=UNIFORM
*End Assembly
**
** MATERIALS
**
*Material, name=A1
*Elastic
3300., 0.35
**
** BOUNDARY CONDITIONS
**
** Name: Disp-BC-1 Type: Displacement/Rotation
*Boundary
WALL, 1, 1
WALL, 2, 2
WALL, 3, 3
WALL, 4, 4
WALL, 5, 5
WALL, 6, 6
** ----------------------------------------------------------------
**
** STEP: Step-1
**
*Step, name=Step-1, nlgeom=NO, perturbation
*Static
**
** LOADS
**
** Name: CFORCE-1   Type: Concentrated force
*Cload
_M15, 3, 1.
**
** OUTPUT REQUESTS
**
**
** FIELD OUTPUT: F-Output-1
**
*Output, field
*Node Output, nset=TIP
U,
*Output, history, frequency=0
*End Step
